# OpenSim document version 40500
Model Subject-test-scaled:
  gravity: 0 -9.80665 0
  publications: Comp Meth Biomech Biomed Eng 2014
  length_units: meters
  force_units: N
  credits:
    Katherine R. Saul, Wendy M. Murray, Craig M. Goehler, Melissa Daly, Meghan E. Vidt, Dustin L. Crouch
  Ground
  BodySet:
    Body thorax: mass=0 [kg] mass_center=(0 0 0) inertia=(0 0 0 0 0 0) meshes=thorax.vtp
      WrapEllipsoid Thorax: xyz_body_rotation=(0.0434587 -0.331962 0.189892)
          translation=(-0.03802935 -0.1319892 0.06147809) quadrant=all dimensions=(0.09748375 0.1397489 0.07045727)
    Body clavicle: mass=1.955378 mass_center=(-0.01093196 0.00660703 0.04696961)
        inertia=(0.002361331 0.002361331 0.0005687565 -0.0002430211 -0.0007489236 0.000605265) meshes=clavicle.vtp
    Body clavphant: mass=0.001253448 mass_center=(0 0 0) inertia=(11.26913 11.71787 11.71787 0 0 0)
    Body scapula: mass=8.823769 mass_center=(-0.05388542 -0.03632244 -0.03792219)
        inertia=(0.0151565 0.01231858 0.0151565 0.005754146 0.004381963 0.002716987) meshes=scapula.vtp
      WrapEllipsoid Deltoid2: xyz_body_rotation=(3.13042 -1.54881 -1.31423)
          translation=(-0.005714255 -0.0391924 0.008324255) quadrant=-y dimensions=(0.03385388 0.03520442 0.03448069)
      WrapTorus Delt3: xyz_body_rotation=(0.620988 0.32882 -0.560774) translation=(-0.09586155 -0.04437658 -0.03208307)
          quadrant=all inner_radius=0.03923043 outer_radius=0.05884564
      WrapTorus INFSP: xyz_body_rotation=(0.0253073 0.58835 0.151844)
          translation=(-0.05527064 -0.02063304 -0.009711631) quadrant=all inner_radius=0.007949589
          outer_radius=0.01888027
      WrapEllipsoid TMIN: xyz_body_rotation=(-2.09754 -0.280823 -1.76348)
          translation=(-0.04118204 -0.05381179 -0.03112925) quadrant=x dimensions=(0.0272325 0.02972778 0.04978995)
      WrapCylinder TRIlongglen: xyz_body_rotation=(1.37532 -0.294612 2.43596)
          translation=(-0.03536927 -0.03203823 -0.01144585) quadrant=x radius=0.002799664 length=0.03081491
    Body scapphant: mass=0.001253448 mass_center=(0 0 0) inertia=(11.26913 11.71787 11.71787 0 0 0)
    Body humphant: mass=0.001253448 mass_center=(0 0 0) inertia=(11.26913 11.71787 11.71787 0 0 0)
    Body humphant1: mass=0.001253448 mass_center=(0 0 0) inertia=(11.26913 11.71787 11.71787 0 0 0)
    Body humerus: mass=25.03849 mass_center=(0.01574056 -0.1221157 -0.01110658)
        inertia=(0.1168509 0.02428205 0.1197185 -0.003306443 -0.002212797 0.01169975) meshes=humerus.vtp
      WrapEllipsoid DELT1hh: xyz_body_rotation=(0.0584685 1.00461 0.570374)
          translation=(-0.01211215 -0.01106649 -0.02283009) quadrant=z dimensions=(0.02614132 0.08713774 0.04356887)
      WrapCylinder delt2hum: xyz_body_rotation=(1.55093 -0.0199582 0.0596618)
          translation=(0.001481342 -0.08347795 0.0009585151) quadrant=all radius=0.009498013 length=0.1045653
      WrapEllipsoid delt3hum: xyz_body_rotation=(1.72735 0.0759218 -2.74313)
          translation=(0.001655617 -0.05158554 0.0009585151) quadrant=x dimensions=(0.008713774 0.008713774 0.04356887)
      WrapEllipsoid SUPSP: xyz_body_rotation=(0.0380482 0.00855211 -1.30673)
          translation=(0.0001742755 0.006709606 0.003746923) quadrant=all dimensions=(0.01742755 0.01742755 0.01742755)
      WrapEllipsoid INFSP_and_TMIN_hum_head: xyz_body_rotation=(-0.286583 -0.00907571 -0.0684169)
          translation=(-0.0002614132 0.002265581 0.003311234) quadrant=all
          dimensions=(0.01742755 0.02178443 0.01742755)
      WrapCylinder infsp_new: xyz_body_rotation=(1.52911 -0.345 -0.65966)
          translation=(-0.001655617 -0.01655617 0.00191703) quadrant=-x radius=0.02047737 length=0.1002084
      WrapEllipsoid SUBSCAP: xyz_body_rotation=(-0.924501 0.288852 0.381529)
          translation=(-0.002178443 0.0006099642 -0.003921198) quadrant=all
          dimensions=(0.01742755 0.01481342 0.02439857)
      WrapEllipsoid LIGhh_s: xyz_body_rotation=(-0.785 0 0) translation=(-0.0008713774 0.002614132 0.002614132)
          quadrant=all dimensions=(0.01742755 0.01742755 0.01742755)
      WrapEllipsoid LIGhh_mi: xyz_body_rotation=(-0.785 0 0) translation=(-0.0008713774 0.003485509 0.0008713774)
          quadrant=all dimensions=(0.01786324 0.01655617 0.01786324)
      WrapCylinder TMINhum: xyz_body_rotation=(1.47353 0.0229 3.21463)
          translation=(0.002614132 -0.02222012 0.001132791) quadrant=x radius=0.0191703 length=0.09846564
      WrapCylinder TMAJ_LAThum: xyz_body_rotation=(1.53641 -0.0637045 1.41424)
          translation=(0.0006099642 -0.03860202 -0.004792575) quadrant=-x radius=0.006099642 length=0.03485509
      WrapCylinder PEC12hum: xyz_body_rotation=(1.55928 -0.0774926 -0.925897)
          translation=(0.001742755 -0.04426597 -0.001481342) quadrant=x radius=0.007842396 length=0.06099642
      WrapSphere PEC23hh: translation=(-0.007493845 0.001829892 -0.0003485509) quadrant=all radius=0.01742755
      WrapEllipsoid PEC1hh: xyz_body_rotation=(-0.620465 -0.310494 0.363727)
          translation=(-0.003224096 0.0004356887 -0.002178443) quadrant=-z
          dimensions=(0.02614132 0.01742755 0.01742755)
      WrapCylinder PEC3hum: xyz_body_rotation=(1.44094 -0.0561996 1.75196)
          translation=(0.0007842396 -0.04801289 -0.0003485509) quadrant=-x radius=0.006971019 length=0.08713774
      WrapCylinder LAT_TMAJhh: xyz_body_rotation=(-0.305084 -0.018326 -0.686613)
          translation=(-0.01951885 0.008888049 0.008190947) quadrant=-y radius=0.006099642 length=0.03921198
      WrapSphere LAT_TMAJ2hh: xyz_body_rotation=(-0.127235 0.276111 0.0197222)
          translation=(-0.001394204 0.008016672 0.004531162) quadrant=all radius=0.02614132
      WrapEllipsoid Elbow_BIC_BRD: xyz_body_rotation=(-0.128631 0.137532 0.0307178)
          translation=(0.001655617 -0.2518281 -0.01219928) quadrant=x dimensions=(0.01307066 0.01307066 0.08713774)
      WrapEllipsoid TRIlonghh: xyz_body_rotation=(3.00162 -0.853466 2.57419)
          translation=(-0.006796743 -0.003572647 -0.001219928) quadrant=z dimensions=(0.03049821 0.01742755 0.01742755)
      WrapCylinder TRI: xyz_body_rotation=(-0.14015 -0.00628319 0.154985)
          translation=(0.002439857 -0.2543551 -0.01036939) quadrant=all radius=0.01394204 length=0.08713774
      WrapEllipsoid ANC: xyz_body_rotation=(0.00750492 -0.196699 1.04929)
          translation=(0.01167646 -0.2493011 -0.0006971019) quadrant=-x dimensions=(0.01742755 0.01742755 0.01742755)
      WrapEllipsoid BIClong: xyz_body_rotation=(-2.00434 -1.00164 0.975465)
          translation=(0.002875545 0.004356887 0.0002614132) quadrant=-y dimensions=(0.02178443 0.01742755 0.01742755)
      WrapSphere TMAJ_LAT_PEC_CORBhh: translation=(0.0006099642 0 0.005228264) quadrant=all radius=0.02614132
      WrapSphere DELT_TMAJ_LAT_PEC_CORBhh: translation=(0.0006099642 0 0.005228264) quadrant=all radius=0.02614132
      WrapCylinder CORBhum: xyz_body_rotation=(-1.60832 0.0959931 0.875283)
          translation=(0.002352719 -0.1047396 -0.005141126) quadrant=x radius=0.006971019 length=0.08713774
      WrapEllipsoid Elbow_PT_ECRL: xyz_body_rotation=(-0.161094 -0.110828 0.61453)
          translation=(0.002614132 -0.2502596 -0.006012504) quadrant=x dimensions=(0.01568479 0.02178443 0.03049821)
    Body ulna: mass=13.85436 mass_center=(0.008893717 -0.08781386 0.02222644)
        inertia=(0.05683023 0.01210685 0.05190131 0.003326607 -0.0007994734 0.01146129) meshes=ulna.vtp
      WrapCylinder PQ2: xyz_body_rotation=(1.39138 0.0689405 1.52245) translation=(-0.001098235 -0.1914589 0.03917038)
          quadrant=all radius=0.00640637 length=0.09151957
    Body radius: mass=2.927928 mass_center=(0.03078179 -0.166162 0.01427705)
        inertia=(0.00460419 0.0009300769 0.004226553 0.0003164298 -4.451435e-5 0.0006738044) meshes=radius.vtp
      WrapCylinder SUP: xyz_body_rotation=(1.44775 0.304036 -2.44102) translation=(0.004118381 -0.03999405 0.005399655)
          quadrant=-x radius=0.007321566 length=0.03660783
      WrapTorus ECU: xyz_body_rotation=(-0.986635 -0.148877 0.222704) translation=(-0.01491769 -0.2212028 0.03194033)
          quadrant=all inner_radius=0.005491174 outer_radius=0.008236762
      WrapCylinder PQ1: xyz_body_rotation=(-1.60762 -0.0127409 -2.69025) translation=(0.025717 -0.1817579 0.02635764)
          quadrant=all radius=0.009151957 length=0.09151957
    Body proximal_row: mass=0.001253448 mass_center=(0 0 0) inertia=(8.459044e-5 8.459044e-5 8.459044e-5 0 0 0)
        meshes=(lunate.vtp sdfastSCAPHOIDw.vtp sdfastPISIFORMw.vtp sdfastTRIQUETRALw.vtp)
      WrapEllipsoid Extensor_ellipse: xyz_body_rotation=(-0.250804 0.285536 0.232827)
          translation=(0.00057505 -0.01109025 0.00386105) quadrant=z dimensions=(0.041075 0.01643 0.0106795)
      WrapTorus ECRL: xyz_body_rotation=(1.53833 0.234398 0.731118) translation=(0.0182373 -0.0078864 0.0170872)
          quadrant=all inner_radius=0.006572 outer_radius=0.013144
      WrapTorus ECRB: xyz_body_rotation=(1.31266 -0.11781 -0.116239) translation=(0.0103509 -0.00780425 0.0152799)
          quadrant=all inner_radius=0.006572 outer_radius=0.008215
      WrapTorus FCR: xyz_body_rotation=(-1.55596 -0.15324 -0.100007) translation=(0.0026288 -0.00369675 -0.0156085)
          quadrant=all inner_radius=0.0008215 outer_radius=0.00205375
      WrapTorus FCU: xyz_body_rotation=(-1.57376 -0.0797616 0.39235) translation=(-0.01010445 -0.0101866 -0.01404765)
          quadrant=all inner_radius=0.0055862 outer_radius=0.006572
      WrapEllipsoid PL: xyz_body_rotation=(-0.0315905 0.0996583 0.0633554)
          translation=(0.00468255 -0.014787 -0.00336815) quadrant=-z dimensions=(0.0205375 0.011501 0.009858)
      WrapEllipsoid FDS: xyz_body_rotation=(0.00837758 -0.0816814 -0.0171042)
          translation=(0.0009858 -0.00468255 -0.00024645) quadrant=-z dimensions=(0.0205375 0.0106795 0.009858)
      WrapEllipsoid FDP: xyz_body_rotation=(-1.46747 -0.194604 0.121824) translation=(-0.0018073 -0.00566835 0.0026288)
          quadrant=y dimensions=(0.0205375 0.0106795 0.009858)
      WrapTorus EDCL: xyz_body_rotation=(2.36318 0.193033 -0.26913) translation=(-0.0105152 -0.01092595 0.0121582)
          quadrant=all inner_radius=0.006572 outer_radius=0.009858
      WrapTorus EDCR: xyz_body_rotation=(1.98392 0.100531 0.523075) translation=(-0.0080507 -0.01125455 0.0136369)
          quadrant=all inner_radius=0.00862575 outer_radius=0.0090365
      WrapTorus EDCM: xyz_body_rotation=(1.99317 0.19792 0.368264) translation=(-0.00057505 -0.00961155 0.01569065)
          quadrant=all inner_radius=0.0073935 outer_radius=0.009858
      WrapTorus EDCI: xyz_body_rotation=(1.69768 0.0897099 0.00767945) translation=(0.0073935 -0.01224035 0.01733365)
          quadrant=all inner_radius=0.0073935 outer_radius=0.009858
      WrapEllipsoid EDM: xyz_body_rotation=(2.9627 0.159349 0.117984) translation=(-0.01371905 -0.0018073 0.0039432)
          quadrant=-z dimensions=(0.014787 0.011501 0.006572)
      WrapEllipsoid FPL: xyz_body_rotation=(-0.16633 -0.082205 -0.0659735)
          translation=(0.0139655 -0.0205375 -0.00271095) quadrant=-z dimensions=(0.013144 0.008215 0.008215)
    Body hand: mass=7.293811 mass_center=(-0.002475295 -0.03491318 -0.0009217641)
        inertia=(0.0009304949 0.0005075427 0.001268857 7.61314e-6 -1.691809e-6 0.0001015085)
        meshes=(sdfast_1seg_hand_fr_c_5mc.vtp sdfast_1seg_hand_fr_c_4mc.vtp sdfast_1seg_hand_fr_c_3mc.vtp sdfast_1seg_hand_fr_c_2mc.vtp sdfast_1seg_hand_fr_c_trapezium.vtp sdfast_1seg_hand_fr_c_trapezoid.vtp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)
      WrapCylinder _2rdmcp_FDS: xyz_body_rotation=(0.593936 1.50011 -2.16578)
          translation=(0.0149513 -0.05413685 0.00714705) quadrant=y radius=0.0106795 length=0.008215
      WrapCylinder _2rdmcp_FDP: xyz_body_rotation=(0.593936 1.50011 -2.23559)
          translation=(0.0149513 -0.05413685 0.00714705) quadrant=y radius=0.00862575 length=0.008215
      WrapCylinder _2rdmcp_ext: xyz_body_rotation=(0.593936 1.50011 -1.99125)
          translation=(0.0149513 -0.05413685 0.00714705) quadrant=-y radius=0.008215 length=0.008215
      WrapEllipsoid _2ndmcp: active=false xyz_body_rotation=(1.48667 -1.29661 2.43072)
          translation=(0.0169229 -0.055862 0.0036146) quadrant=-x dimensions=(0.0041075 0.0041075 0.024645)
      WrapCylinder _3rdmcp_FDS: xyz_body_rotation=(0.770388 1.32837 1.5708)
          translation=(0.00057505 -0.05380825 0.0075578) quadrant=-x radius=0.0106795 length=0.008215
      WrapCylinder _3rdmcp_FDP: xyz_body_rotation=(0.770388 1.32837 1.5708)
          translation=(0.0037789 -0.0543833 0.00813285) quadrant=-x radius=0.00862575 length=0.008215
      WrapCylinder _3rdmcp_ext: xyz_body_rotation=(0.770388 1.32837 1.46608)
          translation=(0.00057505 -0.05380825 0.0075578) quadrant=y radius=0.008215 length=0.008215
      WrapCylinder _4rdmcp_FDS: xyz_body_rotation=(0.858527 1.10165 -2.48535)
          translation=(-0.01141885 -0.0527403 0.00271095) quadrant=y radius=0.0106795 length=0.008215
      WrapCylinder _4rdmcp_FDP: xyz_body_rotation=(0.858527 1.10165 -2.48535)
          translation=(-0.01141885 -0.0527403 0.00271095) quadrant=y radius=0.00862575 length=0.008215
      WrapCylinder _4rdmcp_ext: xyz_body_rotation=(0.858527 1.10165 -3.09621)
          translation=(-0.01141885 -0.0527403 0.00271095) quadrant=x radius=0.008215 length=0.008215
      WrapCylinder _5rdmcp_FDS: xyz_body_rotation=(0.470541 0.975639 -2.12162)
          translation=(-0.01930525 -0.04608615 -0.00468255) quadrant=y radius=0.0106795 length=0.009858
      WrapCylinder _5rdmcp_FDP: xyz_body_rotation=(0.470541 0.975639 -2.34852)
          translation=(-0.01930525 -0.04608615 -0.00468255) quadrant=y radius=0.00862575 length=0.008215
      WrapCylinder _5rdmcp_ext: xyz_body_rotation=(0.470541 0.975639 -1.68529)
          translation=(-0.01930525 -0.04608615 -0.00468255) quadrant=-y radius=0.008215 length=0.009858
      WrapCylinder Secondpm_FDS: xyz_body_rotation=(-1.57813 1.24808 1.0259)
          translation=(0.02522005 -0.0759066 -0.0182373) quadrant=y radius=0.00616125 length=0.008215
      WrapCylinder Secondpm_FDP: xyz_body_rotation=(-1.57813 1.24808 1.0259)
          translation=(0.02522005 -0.0759066 -0.0182373) quadrant=y radius=0.006572 length=0.008215
      WrapCylinder Secondpm_ext: xyz_body_rotation=(-1.57813 1.24808 1.0259)
          translation=(0.02522005 -0.0759066 -0.0182373) quadrant=-y radius=0.00451825 length=0.009858
      WrapCylinder Secondmd_flex: xyz_body_rotation=(-1.63171 1.34286 2.11639)
          translation=(0.02390565 -0.06744515 -0.0369675) quadrant=y radius=0.0041075 length=0.008215
      WrapCylinder Secondmd_ext: xyz_body_rotation=(-1.63171 1.34286 2.11639)
          translation=(0.02390565 -0.06744515 -0.0369675) quadrant=-y radius=0.001643 length=0.008215
      WrapCylinder Secondpm: active=false xyz_body_rotation=(2.2513 -1.37008 1.18159)
          translation=(0.0251379 -0.07483865 -0.01831945) quadrant=all radius=0.003286 length=0.008215
      WrapCylinder Secondmd: active=false xyz_body_rotation=(1.35525 -1.38387 -0.557109)
          translation=(0.02423425 -0.06695225 -0.03622815) quadrant=x radius=0.0024645 length=0.008215
      WrapCylinder MPthumb: xyz_body_rotation=(0.321315 0.11013 -0.834791)
          translation=(0.0330243 -0.03327075 -0.02226265) quadrant=all radius=0.00698275 length=0.01643
      WrapCylinder IPthumb: xyz_body_rotation=(0.332136 -0.026529 -0.257611)
          translation=(0.0325314 -0.05857295 -0.02998475) quadrant=-x radius=0.00369675 length=0.008215
      WrapCylinder Thirdpm_FDS: xyz_body_rotation=(-0.407883 1.45246 -0.145386)
          translation=(0.0100223 -0.0767281 -0.0195517) quadrant=y radius=0.00616125 length=0.008215
      WrapCylinder Thirdpm_FDP: xyz_body_rotation=(-0.407883 1.45246 -0.145386)
          translation=(0.0100223 -0.0767281 -0.0195517) quadrant=y radius=0.006572 length=0.008215
      WrapCylinder Thirdpm_ext: xyz_body_rotation=(-0.407883 1.45246 -0.145386)
          translation=(0.0100223 -0.0767281 -0.0195517) quadrant=-y radius=0.00451825 length=0.008215
      WrapCylinder Thirdmd_flex: xyz_body_rotation=(0.714189 1.28282 -0.203331)
          translation=(0.0156085 -0.0668701 -0.0405821) quadrant=y radius=0.0041075 length=0.008215
      WrapCylinder Thirdmd_ext: xyz_body_rotation=(0.714189 1.28282 -0.203331)
          translation=(0.0156085 -0.0668701 -0.0405821) quadrant=-y radius=0.001643 length=0.008215
      WrapCylinder Fourthpm_FDS: xyz_body_rotation=(0.696212 0.976861 -1.21876)
          translation=(-0.0041075 -0.07155265 -0.02374135) quadrant=y radius=0.00616125 length=0.008215
      WrapCylinder Fourthpm_FDP: xyz_body_rotation=(0.696212 0.976861 -1.21876)
          translation=(-0.0041075 -0.07155265 -0.02374135) quadrant=y radius=0.006572 length=0.008215
      WrapCylinder Fourthpm_ext: xyz_body_rotation=(0.696212 0.976861 -1.21876)
          translation=(-0.0041075 -0.07155265 -0.02374135) quadrant=-y radius=0.00451825 length=0.008215
      WrapCylinder Fourthmd_flex: xyz_body_rotation=(0.75311 0.925897 -0.167377)
          translation=(0.0077221 -0.0639127 -0.03852835) quadrant=y radius=0.0041075 length=0.008215
      WrapCylinder Fourthmd_ext: xyz_body_rotation=(0.75311 0.925897 -0.167377)
          translation=(0.0077221 -0.0639127 -0.03852835) quadrant=-y radius=0.001643 length=0.008215
      WrapCylinder Fifthpm_FDS: xyz_body_rotation=(0.977035 0.825192 -1.51687)
          translation=(-0.0126511 -0.0644056 -0.02702735) quadrant=y radius=0.00616125 length=0.008215
      WrapCylinder Fifthpm_FDP: xyz_body_rotation=(0.977035 0.825192 -1.79612)
          translation=(-0.01256895 -0.0645699 -0.02702735) quadrant=y radius=0.006572 length=0.008215
      WrapCylinder Fifthpm_ext: xyz_body_rotation=(0.977035 0.825192 -1.08053)
          translation=(-0.0124868 -0.06448775 -0.0269452) quadrant=-y radius=0.00451825 length=0.008215
      WrapCylinder Fifthmd_flex: xyz_body_rotation=(0.979304 0.65031 -0.620814)
          translation=(0.00057505 -0.06087315 -0.03754255) quadrant=y radius=0.0041075 length=0.008215
      WrapCylinder Fifthmd_ext: xyz_body_rotation=(0.979304 0.65031 -0.620814)
          translation=(0.0057505 -0.06087315 -0.03754255) quadrant=-y radius=0.001643 length=0.008215
  JointSet:
    CustomJoint groundthorax: socket_parent_frame=ground_offset socket_child_frame=thorax_offset
      Coordinate r_x: default_value=0 range=(-6.283185 6.283185) clamped=false
      Coordinate r_y: default_value=-1.570796 range=(-6.283185 6.283185) clamped=false
      Coordinate r_z: default_value=0 range=(-6.283185 6.283185) clamped=false
      Coordinate t_x: default_value=0 range=(-100 100) clamped=true
      Coordinate t_y: default_value=0 range=(-100 100) clamped=true
      Coordinate t_z: default_value=0 range=(-100 100) clamped=true
      PhysicalOffsetFrame ground_offset: socket_parent=/ground translation=(0 0 0) [meters]
      PhysicalOffsetFrame thorax_offset: socket_parent=/bodyset/thorax translation=(0 0 0)
      SpatialTransform:
        TransformAxis rotation1: coordinates=r_x axis=(1 0 0) LinearFunction(coefficients=1 0)
        TransformAxis rotation2: coordinates=r_y axis=(0 1 0) LinearFunction(coefficients=1 0)
        TransformAxis rotation3: coordinates=r_z axis=(0 0 1) LinearFunction(coefficients=1 0)
        TransformAxis translation1: coordinates=t_x axis=(1 0 0) LinearFunction(coefficients=1 0)
        TransformAxis translation2: coordinates=t_y axis=(0 1 0) LinearFunction(coefficients=1 0)
        TransformAxis translation3: coordinates=t_z axis=(0 0 1) LinearFunction(coefficients=1 0)
    CustomJoint sternoclavicular: socket_parent_frame=thorax_offset socket_child_frame=clavicle_offset
      Coordinate sternoclavicular_r2: default_value=-0.1267112 range=(-99999.9 99999.9) clamped=false
      Coordinate sternoclavicular_r3: default_value=0.05366888 range=(-99999.9 99999.9) clamped=false
      PhysicalOffsetFrame thorax_offset: socket_parent=/bodyset/thorax translation=(0.006231493 0.007185274 0.02208095)
      PhysicalOffsetFrame clavicle_offset: socket_parent=/bodyset/clavicle translation=(0 0 0)
      SpatialTransform: axes_held_at_zero=(rotation3 translation1 translation2 translation3)
        TransformAxis rotation1: coordinates=sternoclavicular_r2 axis=(0.0153 0.9892987 -0.1451)
            LinearFunction(coefficients=1 0)
        TransformAxis rotation2: coordinates=sternoclavicular_r3 axis=(-0.9944725 0 -0.104997)
            LinearFunction(coefficients=1 0)
    CustomJoint unrotscap: socket_parent_frame=clavicle_offset socket_child_frame=clavphant_offset
      Coordinate unrotscap_r3: default_value=-0.05366888 range=(-99999.9 99999.9) clamped=false
      Coordinate unrotscap_r2: default_value=0.1267112 range=(-99999.9 99999.9) clamped=false
      PhysicalOffsetFrame clavicle_offset: socket_parent=/bodyset/clavicle
          translation=(-0.01411815 0.0208093 0.1175237)
      PhysicalOffsetFrame clavphant_offset: socket_parent=/bodyset/clavphant translation=(0 0 0)
      SpatialTransform: axes_held_at_zero=(rotation3 translation1 translation2 translation3)
        TransformAxis rotation1: coordinates=unrotscap_r3 axis=(-0.9944725 0 -0.104997)
            LinearFunction(coefficients=1 0)
        TransformAxis rotation2: coordinates=unrotscap_r2 axis=(0.0153 0.9892987 -0.1451)
            LinearFunction(coefficients=1 0)
    CustomJoint acromioclavicular: socket_parent_frame=clavphant_offset socket_child_frame=scapula_offset
      Coordinate acromioclavicular_r2: default_value=-0.02565644 range=(-99999.9 99999.9) clamped=false
      Coordinate acromioclavicular_r3: default_value=0.2073463 range=(-99999.9 99999.9) clamped=false
      Coordinate acromioclavicular_r1: default_value=0.09320074 range=(-99999.9 99999.9) clamped=false
      PhysicalOffsetFrame clavphant_offset: socket_parent=/bodyset/clavphant translation=(0 0 0)
      PhysicalOffsetFrame scapula_offset: socket_parent=/bodyset/scapula translation=(0 0 0)
      SpatialTransform: axes_held_at_zero=(translation1 translation2 translation3)
        TransformAxis rotation1: coordinates=acromioclavicular_r2 axis=(0.1570949 0.9472686 -0.2792909)
            LinearFunction(coefficients=1 0)
        TransformAxis rotation2: coordinates=acromioclavicular_r3 axis=(-0.754084 0.297594 0.585487)
            LinearFunction(coefficients=1 0)
        TransformAxis rotation3: coordinates=acromioclavicular_r1 axis=(0.6376998 0.1186 0.7610998)
            LinearFunction(coefficients=1 0)
    CustomJoint unrothum: socket_parent_frame=scapula_offset socket_child_frame=scapphant_offset
      Coordinate unrothum_r1: default_value=-0.09320074 range=(-99999.9 99999.9) clamped=false
      Coordinate unrothum_r3: default_value=-0.2073463 range=(-99999.9 99999.9) clamped=false
      Coordinate unrothum_r2: default_value=0.02565644 range=(-99999.9 99999.9) clamped=false
      PhysicalOffsetFrame scapula_offset: socket_parent=/bodyset/scapula
          translation=(-0.009408816 -0.03525242 0.007803989)
      PhysicalOffsetFrame scapphant_offset: socket_parent=/bodyset/scapphant translation=(0 0 0)
      SpatialTransform: axes_held_at_zero=(translation1 translation2 translation3)
        TransformAxis rotation1: coordinates=unrothum_r1 axis=(0.6376998 0.1186 0.7610998)
            LinearFunction(coefficients=1 0)
        TransformAxis rotation2: coordinates=unrothum_r3 axis=(-0.754084 0.297594 0.585487)
            LinearFunction(coefficients=1 0)
        TransformAxis rotation3: coordinates=unrothum_r2 axis=(0.1570949 0.9472686 -0.2792909)
            LinearFunction(coefficients=1 0)
    CustomJoint shoulder0: socket_parent_frame=scapphant_offset socket_child_frame=humphant_offset
      Coordinate elv_angle: default_value=1.570796 range=(-1.658063 2.268928) clamped=true
      PhysicalOffsetFrame scapphant_offset: socket_parent=/bodyset/scapphant translation=(0 0 0)
      PhysicalOffsetFrame humphant_offset: socket_parent=/bodyset/humphant translation=(0 0 0)
      SpatialTransform: axes_held_at_zero=(rotation2 rotation3 translation1 translation2 translation3)
        TransformAxis rotation1: coordinates=elv_angle axis=(0.0048 0.9990892 0.04240001)
            LinearFunction(coefficients=1 0)
    CustomJoint shoulder1: socket_parent_frame=humphant_offset socket_child_frame=humphant1_offset
      Coordinate shoulder_elv: default_value=0.5235988 range=(0 3.141593) clamped=true
      Coordinate shoulder1_r2: default_value=-1.570796 range=(-99999.9 99999.9) clamped=false
      PhysicalOffsetFrame humphant_offset: socket_parent=/bodyset/humphant translation=(0 0 0)
      PhysicalOffsetFrame humphant1_offset: socket_parent=/bodyset/humphant1 translation=(0 0 0)
      SpatialTransform: axes_held_at_zero=(rotation3 translation1 translation2 translation3)
        TransformAxis rotation1: coordinates=shoulder_elv axis=(-0.9982614 0.0023 0.05889802)
            LinearFunction(coefficients=1 0)
        TransformAxis rotation2: coordinates=shoulder1_r2 axis=(0.0048 0.9990892 0.04240001)
            LinearFunction(coefficients=1 0)
    CustomJoint shoulder2: socket_parent_frame=humphant1_offset socket_child_frame=humerus_offset
      Coordinate shoulder_rot: default_value=0 range=(-1.570796 2.094395) clamped=true
      PhysicalOffsetFrame humphant1_offset: socket_parent=/bodyset/humphant1 translation=(0 0 0)
      PhysicalOffsetFrame humerus_offset: socket_parent=/bodyset/humerus translation=(0 0 0)
      SpatialTransform: axes_held_at_zero=(rotation2 rotation3 translation1 translation2 translation3)
        TransformAxis rotation1: coordinates=shoulder_rot axis=(0.0048 0.9990892 0.04240001)
            LinearFunction(coefficients=1 0)
    CustomJoint elbow: socket_parent_frame=humerus_offset socket_child_frame=ulna_offset
      Coordinate elbow_flexion: default_value=0 range=(0 2.268928) clamped=true
      PhysicalOffsetFrame humerus_offset: socket_parent=/bodyset/humerus
          translation=(0.005315402 -0.253048 -0.01071794)
      PhysicalOffsetFrame ulna_offset: socket_parent=/bodyset/ulna translation=(0 0 0)
      SpatialTransform: axes_held_at_zero=(rotation2 rotation3 translation1 translation2 translation3)
        TransformAxis rotation1: coordinates=elbow_flexion axis=(0.04940001 0.03660001 0.9981083)
            LinearFunction(coefficients=1 0)
    CustomJoint radioulnar: socket_parent_frame=ulna_offset socket_child_frame=radius_offset
      Coordinate pro_sup: default_value=-2e-8 range=(-1.570796 1.570796) clamped=true
      PhysicalOffsetFrame ulna_offset: socket_parent=/bodyset/ulna translation=(0.0003660783 -0.0105275 0.018303)
      PhysicalOffsetFrame radius_offset: socket_parent=/bodyset/radius translation=(0 0 0)
      SpatialTransform: axes_held_at_zero=(rotation2 rotation3 translation1 translation2 translation3)
        TransformAxis rotation1: coordinates=pro_sup axis=(-0.01716099 0.9926656 -0.119668)
            LinearFunction(coefficients=1 0)
    CustomJoint radiocarpal: socket_parent_frame=radius_offset socket_child_frame=proximal_row_offset
      Coordinate deviation: default_value=0 range=(-0.45 0.79) clamped=true
      Coordinate flexion: default_value=0 range=(-1.4 1.57) clamped=true
      PhysicalOffsetFrame radius_offset: socket_parent=/bodyset/radius translation=(0.01647352 -0.2214774 0.02287989)
      PhysicalOffsetFrame proximal_row_offset: socket_parent=/bodyset/proximal_row translation=(0 0 0)
      SpatialTransform: axes_held_at_zero=(rotation2 translation1 translation2 translation3)
        TransformAxis rotation1: coordinates=deviation axis=(-0.819064 -0.135611 -0.557444)
          SimmSpline: x=(-0.174533 0 0.436332) y=(-0.174533 0 0.436332)
        TransformAxis rotation3: coordinates=flexion axis=(0.9564267 -0.2522069 0.147104)
          SimmSpline: x=(-1.5708 1.5708) y=(-0.785398 0.785398)
    CustomJoint wrist_hand: socket_parent_frame=proximal_row_offset socket_child_frame=hand_offset
      Coordinate wrist_hand_r1: default_value=0 range=(-99999.9 99999.9) clamped=false
      Coordinate wrist_hand_r3: default_value=0 range=(-99999.9 99999.9) clamped=false
      PhysicalOffsetFrame proximal_row_offset: socket_parent=/bodyset/proximal_row
          translation=(0.003279428 -0.01236686 0.001911631)
      PhysicalOffsetFrame hand_offset: socket_parent=/bodyset/hand translation=(0 0 0)
      SpatialTransform: axes_held_at_zero=(rotation3 translation1 translation2 translation3)
        TransformAxis rotation1: coordinates=wrist_hand_r1 axis=(0.8991357 -0.3490529 -0.2640399)
            LinearFunction(coefficients=1 0)
        TransformAxis rotation2: coordinates=wrist_hand_r3 axis=(0.9971185 0.01069999 -0.07510096)
            LinearFunction(coefficients=1 0)
  ConstraintSet:
    CoordinateCouplerConstraint [values shared by the 13 below unless stated]: independent_coordinate_names=shoulder_elv
        scale_factor=1
    CoordinateCouplerConstraint sternoclavicular_r2_con: dependent_coordinate_name=sternoclavicular_r2
      coupled_coordinates_function: SimmSpline: x=(0 2.61799) y=(0 -0.633555)
    CoordinateCouplerConstraint sternoclavicular_r3_con: dependent_coordinate_name=sternoclavicular_r3
      coupled_coordinates_function: SimmSpline: x=(0 3.14159) y=(0 0.322013)
    CoordinateCouplerConstraint unrotscap_r2_con: dependent_coordinate_name=unrotscap_r2
      coupled_coordinates_function: SimmSpline: x=(0 2.61799) y=(0 0.633555)
    CoordinateCouplerConstraint unrotscap_r3_con: dependent_coordinate_name=unrotscap_r3
      coupled_coordinates_function: SimmSpline: x=(0 3.14159) y=(0 -0.322013)
    CoordinateCouplerConstraint acromioclavicular_r1_con: dependent_coordinate_name=acromioclavicular_r1
      coupled_coordinates_function: SimmSpline: x=(0 2.61799) y=(0 0.466003)
    CoordinateCouplerConstraint acromioclavicular_r2_con: dependent_coordinate_name=acromioclavicular_r2
      coupled_coordinates_function: SimmSpline: x=(0 2.61799) y=(0 -0.128282)
    CoordinateCouplerConstraint acromioclavicular_r3_con: dependent_coordinate_name=acromioclavicular_r3
      coupled_coordinates_function: SimmSpline: x=(0 2.61799) y=(0 1.03673)
    CoordinateCouplerConstraint unrothum_r1_con: dependent_coordinate_name=unrothum_r1
      coupled_coordinates_function: SimmSpline: x=(0 2.61799) y=(0 -0.466003)
    CoordinateCouplerConstraint unrothum_r2_con: dependent_coordinate_name=unrothum_r2
      coupled_coordinates_function: SimmSpline: x=(0 2.61799) y=(0 0.128282)
    CoordinateCouplerConstraint unrothum_r3_con: dependent_coordinate_name=unrothum_r3
      coupled_coordinates_function: SimmSpline: x=(0 2.61799) y=(0 -1.03673)
    CoordinateCouplerConstraint shoulder1_r2_con: independent_coordinate_names=elv_angle
        dependent_coordinate_name=shoulder1_r2
      coupled_coordinates_function: SimmSpline: x=(-1.5708 3.14159) y=(1.5708 -3.14159)
    CoordinateCouplerConstraint wrist_hand_r1_con: independent_coordinate_names=deviation
        dependent_coordinate_name=wrist_hand_r1
      coupled_coordinates_function: SimmSpline f18: x=(-0.174533 0 0.436332) y=(-0.261799 0 0.436332)
    CoordinateCouplerConstraint wrist_hand_r3_con: independent_coordinate_names=flexion
        dependent_coordinate_name=wrist_hand_r3
      coupled_coordinates_function: SimmSpline f19: x=(-1.22173 1.22173) y=(-0.610865 0.610865)
  MarkerSet:
    Marker CLAV: clavicle (0.0143214 -0.0124074 -0.0262012) fixed=true
    Marker STRN: thorax (0.09030838 -0.1691598 0) fixed=true
    Marker C7: thorax (-0.09825828 0.06524114 0) fixed=true
    Marker RSHO: scapula (0.00165225 0.004399212 0.0001719981) fixed=true
    Marker RELB: ulna (-0.01141012 0.01024615 0.03808178) fixed=true
    Marker RWRA: radius (0.0382275 -0.2011638 0.03993671) fixed=true
    Marker RFINx: hand (-0.01469383 -0.04063596 0.01032719) fixed=true
    Marker RWRB: ulna (-0.004304428 -0.2201088 0.0476609) fixed=true
    Marker T10: thorax (-0.146866 -0.07955141 0.003595012)
    Marker RFINy: hand (0.01010412 -0.02398827 0.01221985) fixed=true
    Marker RFIN0: hand (-0.01517249 -0.0237052 0.008044333) fixed=true
